// SBML level 3 version 2

model toy_example_RAF_RAFi()

  // Compartments:
  compartment default = 1;

  // Species:
  substanceOnly species __s0 in default = R_0; __s0 is "R(r=None, i=None)";
  substanceOnly species __s1 in default = I_0; __s1 is "I(r=None)";
  substanceOnly species __s2 in default = 0; __s2 is "R(r=1, i=None) ._br_R(r=1, i=None)";
  substanceOnly species __s3 in default = 0; __s3 is "I(r=1) ._br_R(r=None, i=1)";
  substanceOnly species __s4 in default = 0; __s4 is "I(r=1) ._br_R(r=2, i=1) ._br_R(r=2, i=None)";
  substanceOnly species __s5 in default = 0; __s5 is "I(r=1) ._br_I(r=2) ._br_R(r=3, i=1) ._br_R(r=3, i=2)";

  // Parameters:
  R_0 = 0.01;
  I_0 = 0;
  kr_RR = 10;
  kf_RR = 1;
  phi_RR = 1;
  kr_RI = 0.1;
  kf_RI = 1;
  phi_RI = 1;
  f = 1;
  g = 1;
  var __obs0; __obs0 is "Rtot_obs";
  var __obs1; __obs1 is "Itot_obs";
  var __obs2; __obs2 is "R_BRAFmut_active_obs";
  var __obs3; __obs3 is "R_RAFwt_active_obs";
  var __obs4; __obs4 is "R_obs";
  var __obs5; __obs5 is "RR_obs";
  var __obs6; __obs6 is "RRI_obs";
  var __obs7; __obs7 is "IRRI_obs";

  // Assignment rules:
  Gf_RR := ln(kr_RR/kf_RR);
  Ea0_RR := -(phi_RR*ln(kr_RR/kf_RR)) - ln(kf_RR);
  Gf_RI := ln(kr_RI/kf_RI);
  Ea0_RI := -(phi_RI*ln(kr_RI/kf_RI)) - ln(kf_RI);
  Gf_f := ln(f);
  Gf_g := ln(g);
  Gf_RRI := ln(f);
  Gf_IRRI := ln(f) + ln(g);
  _RR_local1 := kf_RR;
  _RI_local1 := kf_RI;
  _RR_local2 := kf_RR*exp(-(phi_RR*(ln(f) + ln(kr_RR/kf_RR))) + phi_RR*ln(kr_RR/kf_RR));
  _RR_local3 := kf_RR*exp(-(phi_RR*(ln(f) + ln(g) + ln(kr_RR/kf_RR))) + phi_RR*ln(kr_RR/kf_RR));
  __reverse_RR_local1 := kf_RR*exp(phi_RR*ln(kr_RR/kf_RR) + (1 - phi_RR)*ln(kr_RR/kf_RR));
  _RI_local2 := kf_RI*exp(-(phi_RI*(ln(f) + ln(kr_RI/kf_RI))) + phi_RI*ln(kr_RI/kf_RI));
  __reverse_RI_local1 := kf_RI*exp(phi_RI*ln(kr_RI/kf_RI) + (1 - phi_RI)*ln(kr_RI/kf_RI));
  __reverse_RR_local2 := kf_RR*exp(phi_RR*ln(kr_RR/kf_RR) - (1 - phi_RR)*(-ln(f) - ln(kr_RR/kf_RR)));
  __reverse_RR_local3 := kf_RR*exp(phi_RR*ln(kr_RR/kf_RR) - (1 - phi_RR)*(-ln(f) - ln(g) - ln(kr_RR/kf_RR)));
  _RI_local3 := kf_RI*exp(-(phi_RI*(ln(g) + ln(kr_RI/kf_RI))) + phi_RI*ln(kr_RI/kf_RI));
  __reverse_RI_local2 := kf_RI*exp(phi_RI*ln(kr_RI/kf_RI) - (1 - phi_RI)*(-ln(f) - ln(kr_RI/kf_RI)));
  __reverse_RI_local3 := kf_RI*exp(phi_RI*ln(kr_RI/kf_RI) - (1 - phi_RI)*(-ln(g) - ln(kr_RI/kf_RI)));
  __obs0 := __s0 + 2*__s2 + __s3 + 2*__s4 + 2*__s5;
  __obs1 := __s1 + __s3 + __s4 + 2*__s5;
  __obs2 := __s0 + 2*__s2 + __s4;
  __obs3 := 2*__s2 + __s4;
  __obs4 := __s0;
  __obs5 := __s2;
  __obs6 := __s4;
  __obs7 := __s5;

  // Reactions:
  r0: __s0 + __s0 -> __s2; 0.5*_RR_local1*__s0^2 - __reverse_RR_local1*__s2; r0 is "RR";
  r1: __s0 + __s1 -> __s3; _RI_local1*__s0*__s1 - __reverse_RI_local1*__s3; r1 is "RI";
  r2: __s0 + __s3 -> __s4; _RR_local2*__s0*__s3 - __reverse_RR_local2*__s4; r2 is "RR";
  r3: __s3 + __s3 -> __s5; 0.5*_RR_local3*__s3^2 - __reverse_RR_local3*__s5; r3 is "RR";
  r4: __s1 + __s2 -> __s4; 2*_RI_local2*__s1*__s2 - __reverse_RI_local2*__s4; r4 is "RI";
  r5: __s1 + __s4 -> __s5; _RI_local3*__s1*__s4 - 2*__reverse_RI_local3*__s5; r5 is "RI";
end
